<?xml version="1.0" encoding="UTF-8"?>
<channelml xmlns="http://morphml.org/channelml/schema" xmlns:xsi="http://www.w3.org/2001/XMLSchema-instance" xmlns:meta="http://morphml.org/metadata/schema" xsi:schemaLocation="http://morphml.org/channelml/schema http://www.neuroml.org/NeuroMLValidator/NeuroMLFiles/Schemata/v1.8.0/Level2/ChannelML_v1.8.0.xsd" units="Physiological Units">

    <meta:notes>ChannelML file containing a single Channel description</meta:notes>

    <channel_type name="GranSol10_Ca">

        <status value="in_progress">
	  <meta:comment>Original comment: last revised 8.5.2000</meta:comment>
	  <meta:issue>Neuron crashes if trying to use this.</meta:issue>
	</status>

        <meta:notes>CaHVA channel used in Solinas et al. 2010</meta:notes>

        <meta:authorList>
          <meta:modelAuthor>
            <meta:name>E. d'Angelo</meta:name>
          </meta:modelAuthor>
          <meta:modelAuthor>
            <meta:name>T. Nieus</meta:name>
          </meta:modelAuthor>
          <meta:modelAuthor>
            <meta:name>A. Fontana</meta:name>
          </meta:modelAuthor>
	  <meta:modelTranslator>
            <meta:name>Eugenio Piasini</meta:name>
            <meta:institution>UCL</meta:institution>
            <meta:email>e.piasini - at - ucl.ac.uk</meta:email>
          </meta:modelTranslator>
	</meta:authorList>

        <meta:publication>
          <meta:fullTitle>Solinas S., Nieus T, d'Angelo E. (2010) A Realistic Large-Scale Model of the Cerebellum Granular Layer Predicts Circuit Spatio-Temporal Filtering Properties. Front Cell Neurosci. 2010;4:12.</meta:fullTitle>
          <meta:pubmedRef>http://www.ncbi.nlm.nih.gov/pubmed/20508743</meta:pubmedRef>
        </meta:publication>

        <current_voltage_relation cond_law="ohmic" ion="ca" default_gmax="0.00046" default_erev="129.33">
            <q10_settings q10_factor="3" experimental_temp="20"/>

            <gate name="s" instances="2">
                <closed_state id="s0"/>
                <open_state id="s"/>

                <transition name="alpha" from="s0" to="s" expr_form="exponential" rate="0.04944" scale="15.873" midpoint="-29.06"/>
                <transition name="beta" from="s" to="s0" expr_form="exponential" rate="0.08298" scale="-25.641" midpoint="-18.66"/>
            </gate>

	    <gate name="u" instances="1">
                <closed_state id="u0"/>
                <open_state id="u"/>

                <transition name="alpha" from="u0" to="u" expr_form="exponential" rate="0.0013" scale="18.183" midpoint="-48"/>
                <transition name="beta" from="u" to="u0" expr_form="exponential" rate="0.0013" scale="83.33" midpoint="-48"/>
            </gate>
        </current_voltage_relation>

    </channel_type>
</channelml>
