<?xml version="1.0" encoding="UTF-8"?>
<channelml xmlns="http://morphml.org/channelml/schema" xmlns:xsi="http://www.w3.org/2001/XMLSchema-instance" xmlns:meta="http://morphml.org/metadata/schema" xsi:schemaLocation="http://morphml.org/channelml/schema http://www.neuroml.org/NeuroMLValidator/NeuroMLFiles/Schemata/v1.8.0/Level2/ChannelML_v1.8.0.xsd" units="Physiological Units">

    <meta:notes>ChannelML file containing a single Channel description</meta:notes>

    <channel_type name="GranSol10_KCa">

        <status value="in_progress">
	  <meta:comment>Original comment: last revised on 8.5.2000</meta:comment>
	</status>

        <meta:notes>Calcium dependent K+ channel used in Solinas et al. 2010</meta:notes>

        <meta:authorList>
	  <meta:modelAuthor>
            <meta:name>E. d'Angelo</meta:name>
          </meta:modelAuthor>
	  <meta:modelAuthor>
            <meta:name>T. Nieus</meta:name>
          </meta:modelAuthor>
          <meta:modelAuthor>
            <meta:name>A. Fontana</meta:name>
          </meta:modelAuthor>
          <meta:modelTranslator>
            <meta:name>Eugenio Piasini</meta:name>
            <meta:institution>UCL</meta:institution>
            <meta:email>e.piasini - at - ucl.ac.uk</meta:email>
          </meta:modelTranslator>
        </meta:authorList>

        <meta:publication>
          <meta:fullTitle>Solinas S., Nieus T, d'Angelo E. (2010) A Realistic Large-Scale Model of the Cerebellum Granular Layer Predicts Circuit Spatio-Temporal Filtering Properties. Front Cell Neurosci. 2010;4:12.</meta:fullTitle>
          <meta:pubmedRef>http://www.ncbi.nlm.nih.gov/pubmed/20508743</meta:pubmedRef>
        </meta:publication>

        <current_voltage_relation cond_law="ohmic" ion="k" default_gmax="0.0045" default_erev="-84.69">
            <conc_dependence name="Calcium" ion="ca" charge="2" variable_name="ca_conc" min_conc="7.55e-7" max_conc="0.050"/>
            <q10_settings q10_factor="3" experimental_temp="30"/>
            <gate name="c" instances="1">
                <closed_state id="c0"/>
                <open_state id="c"/>

                <transition name="alpha" from="c0" to="c" expr_form="generic" expr="2.5/(1+(1.5E-3*exp(v/(-11.765))/(ca_conc * 1E6)))"/>
                <transition name="beta" from="c" to="c0" expr_form="generic" expr="1.5/(1+(ca_conc*1E6)/(0.15E-3*exp(v/(-11.765))))"/>

            </gate>
        </current_voltage_relation>

    </channel_type>
</channelml>
