<?xml version="1.0" encoding="UTF-8"?>
<channelml xmlns="http://morphml.org/channelml/schema" xmlns:xsi="http://www.w3.org/2001/XMLSchema-instance" xmlns:meta="http://morphml.org/metadata/schema" xsi:schemaLocation="http://morphml.org/channelml/schema http://www.neuroml.org/NeuroMLValidator/NeuroMLFiles/Schemata/v1.8.0/Level2/ChannelML_v1.8.0.xsd" units="Physiological Units">

    <meta:notes>ChannelML file containing a single Channel description</meta:notes>

    <channel_type name="GranSol10_KM">

        <status value="stable">
	  <meta:comment>Original comment: last revised by T. Nieus on 20.11.1999</meta:comment>
	</status>

        <meta:notes>KM channel used in Solinas et al. 2010</meta:notes>

        <meta:authorList>
          <meta:modelAuthor>
            <meta:name>A. Fontana</meta:name>
          </meta:modelAuthor>
	  <meta:modelTranslator>
            <meta:name>Eugenio Piasini</meta:name>
            <meta:institution>UCL</meta:institution>
            <meta:email>e.piasini - at - ucl.ac.uk</meta:email>
          </meta:modelTranslator>
	</meta:authorList>

        <meta:publication>
          <meta:fullTitle>Solinas S., Nieus T, d'Angelo E. (2010) A Realistic Large-Scale Model of the Cerebellum Granular Layer Predicts Circuit Spatio-Temporal Filtering Properties. Front Cell Neurosci. 2010;4:12.</meta:fullTitle>
          <meta:pubmedRef>http://www.ncbi.nlm.nih.gov/pubmed/20508743</meta:pubmedRef>
        </meta:publication>

        <current_voltage_relation cond_law="ohmic" ion="k" default_gmax="0.00025" default_erev="-84.69">
            <q10_settings q10_factor="3" experimental_temp="22"/>

            <gate name="n" instances="1">
                <closed_state id="n0"/>
                <open_state id="n"/>

                <transition name="alpha" from="n0" to="n" expr_form="exponential" rate="0.0033" scale="40" midpoint="-30"/>
                <transition name="beta" from="n" to="n0" expr_form="exponential" rate="0.0033" scale="-20" midpoint="-30"/>
		<steady_state name="inf" from="n0" to="n" expr_form="sigmoid" rate="1" scale="-6" midpoint="-30"/>

            </gate>
        </current_voltage_relation>

    </channel_type>
</channelml>
