<?xml version="1.0" encoding="UTF-8"?>
<channelml xmlns="http://morphml.org/channelml/schema" xmlns:xsi="http://www.w3.org/2001/XMLSchema-instance" xmlns:meta="http://morphml.org/metadata/schema" xsi:schemaLocation="http://morphml.org/channelml/schema http://www.neuroml.org/NeuroMLValidator/NeuroMLFiles/Schemata/v1.8.0/Level2/ChannelML_v1.8.0.xsd" units="Physiological Units">

    <meta:notes>ChannelML file containing a single Channel description</meta:notes>

    <channel_type name="GranSol10_Na">

        <status value="stable">
	  <meta:comment>Original comment: last revised on 8.5.2000</meta:comment>
	</status>

        <meta:notes>Na channel used in Solinas et al. 2010. Original comment: Gutfreund parametrization</meta:notes>

        <meta:authorList>
          <meta:modelAuthor>
            <meta:name>E. d'Angelo</meta:name>
          </meta:modelAuthor>
          <meta:modelAuthor>
            <meta:name>T. Nieus</meta:name>
          </meta:modelAuthor>
          <meta:modelAuthor>
            <meta:name>A. Fontana</meta:name>
          </meta:modelAuthor>
	  <meta:modelTranslator>
            <meta:name>Eugenio Piasini</meta:name>
            <meta:institution>UCL</meta:institution>
            <meta:email>e.piasini - at - ucl.ac.uk</meta:email>
          </meta:modelTranslator>
	</meta:authorList>

        <meta:publication>
          <meta:fullTitle>Solinas S., Nieus T, d'Angelo E. (2010) A Realistic Large-Scale Model of the Cerebellum Granular Layer Predicts Circuit Spatio-Temporal Filtering Properties. Front Cell Neurosci. 2010;4:12.</meta:fullTitle>
          <meta:pubmedRef>http://www.ncbi.nlm.nih.gov/pubmed/20508743</meta:pubmedRef>
        </meta:publication>

        <current_voltage_relation cond_law="ohmic" ion="na" default_gmax="0.013" default_erev="87.39">
            <q10_settings q10_factor="3" experimental_temp="20"/>

            <gate name="m" instances="3">
                <closed_state id="m0"/>
                <open_state id="m"/>
		<!--
	           r_m := Aalpha_m*Kalpha_m = 3 (/ms)
		   M_m := V0alpha_m = -19 (mV)
		   S_m := -Kalpha_m = 10 (mV)
		  -->
                <transition name="alpha" from="m0" to="m" expr_form="exp_linear" rate="3" scale="10" midpoint="-19"/>
                <transition name="beta" from="m" to="m0" expr_form="exponential" rate="12" scale="-18.182" midpoint="-44"/>

                <time_course name="tau" from="m0" to="m" expr_form="generic" expr="1/(alpha + beta) &lt; 0.01 ? 0.01 : 1/(alpha + beta)" />
            </gate>

	    <gate name="h" instances="1">
                <closed_state id="h0"/>
                <open_state id="h"/>

                <transition name="alpha" from="h0" to="h" expr_form="exponential" rate="0.105" scale="-3.333" midpoint="-44"/>
                <transition name="beta" from="h" to="h0" expr_form="sigmoid" rate="0.75" scale="-5" midpoint="-11"/>

                <time_course name="tau" from="h0" to="h" expr_form="generic" expr="1/(alpha + beta) &lt; 0.1 ? 0.1 : 1/(alpha + beta)" />
            </gate>
        </current_voltage_relation>

    </channel_type>
</channelml>
